// COMSOL Multiphysics 5.5.0.359 model "marimba.mph"
// Outline of the model tree

Parameters
  a = 0.009[m]
  height = 0.015[m]
  length = 0.1[m]

Common definitions
  mpf1: ParticipationFactors

Geometry
  geom1 "Geometry 1" (3D, length unit m)
    wp1: WorkPlane | unite = on
      pol1: Polygon
        type = open
        source = table
        table = {{length*0.25, 0}, {0, 0}, {0, height}, {0.1, height}, {0.1, 0}, {length*(0.75), 0}}
      pc1: ParametricCurve | pos = {0.025, 0}; parmax = 0.05; coord = {s, a*sin(s*2*pi/0.1)}
      uni1: Union | input = pc1, pol1
      csol1: ConvertToSolid | input = uni1
    ext1: Extrude | workplane = wp1; input = wp1; distance = 0.025
    fin: Finalize "Form Union"

Materials
  mat1: Common "Material 1" on all domains
    def "Basic"
      density = 800

Physics
  solid: SolidMechanics on all domains
    dependent variable u = {u, v, w}
    lemm1: LinearElasticModel "Linear Elastic Material 1" (default) | SolidModel = Orthotropic
    free1: Free (default)
    init1: init "Initial Values 1" (default)

Mesh
  mesh1 "Mesh 1" (physics-controlled)

Studies
  std1 "Study 1"
    param: Parametric "Parametric Sweep" | pname = a; plistarr = range(0.1[cm],0.01[cm],0.9[cm]); punit = m
    eig: Eigenfrequency | shift = 1[Hz]

Solver configurations
  sol1 "Solution 1" (study std1)
    v1: Variables "Dependent Variables 1"
    e1: Eigenvalue "Eigenvalue Solver 1" | eigvfunscale = maximum; eigvfunscaleparam = 1.04e-07
      dDef: Direct
  sol2 "Parametric Solutions 1" (study std1)

Datasets
  dset1: Solution | solution = sol1
  dset2: Solution | solution = sol2